// SBML level 2 version 4

function function_4_Gal1p_null_k1_degr(Gal1p, k1_degr, main)
  k1_degr*Gal1p/main;
end
function_4_Gal1p_null_k1_degr is "function_4_Gal1p -> null; k1_degr;";

function function_4_rGal3_null_k_r3_degr(k_r3_degr, main, rGal3)
  k_r3_degr*rGal3/main;
end
function_4_rGal3_null_k_r3_degr is "function_4_rGal3 -> null; k_r3_degr;";

function function_18(Gal4p, k_dim, main)
  k_dim*Gal4p*Gal4p/main;
end
function_18 is "function_4_Gal4p + Gal4p -> Gal4p_dim; k_dim";

function function_30(Gal3paGal80p, k3a_80_unbind, main)
  k3a_80_unbind*Gal3paGal80p/main;
end
function_30 is "function_4_Gal3paGal80p -> Gal3pa + Gal80p_dim ; k3a_80_unbind";

function function_9(k_tl3, main, rGal3)
  k_tl3*rGal3/main;
end
function_9 is "function_4_rGal3 -> rGal3 + Gal3p; k_tl3;";

function function_20(Gal4p_dim, k4_degr, main)
  k4_degr*Gal4p_dim/main;
end
function_20 is "function_4_Gal4p_dim -> null; k4_degr;";

function function_31(Gal3paGal80p, k3_degr, main)
  k3_degr*Gal3paGal80p/main;
end
function_31 is "function_4_Gal3paGal80p -> null; 0.5*k3_degr;";

function function_21(Gal80p, k_dim, main)
  k_dim*Gal80p*Gal80p/main;
end
function_21 is "function_4_Gal80p + Gal80p -> Gal80p_dim; k_dim";

function function_4_Gal4p_null_k4_degr(Gal4p, k4_degr, main)
  k4_degr*Gal4p/main;
end
function_4_Gal4p_null_k4_degr is "function_4_Gal4p -> null; k4_degr ;";

function function_26(Gal3p, galI, k3_act, main)
  k3_act*Gal3p*galI/main;
end
function_26 is "function_4_Gal3p + galI -> Gal3pa; k3_act";

function function_4_Gal80p_null_k80_degr(Gal80p, k80_degr, main)
  k80_degr*Gal80p/main;
end
function_4_Gal80p_null_k80_degr is "function_4_Gal80p -> null; k80_degr;";

function function_27(Gal3pa, k3_deact, main)
  k3_deact*Gal3pa/main;
end
function_27 is "function_4_Gal3pa -> Gal3p + galI ; k3_deact";

function function_4_rGal1_null_k_r1_degr(k_r1_degr, main, rGal1)
  k_r1_degr*rGal1/main;
end
function_4_rGal1_null_k_r1_degr is "function_4_rGal1 -> null; k_r1_degr;";

function function_4_null_rGal4_k_tc4(k_tc4, main)
  k_tc4/main;
end
function_4_null_rGal4_k_tc4 is "function_4_null -> rGal4; k_tc4";

function function_4_rGal4_null_k_r4_degr(k_r4_degr, main, rGal4)
  k_r4_degr*rGal4/main;
end
function_4_rGal4_null_k_r4_degr is "function_4_rGal4 -> null ; k_r4_degr";

function function_24(Gal80p_dim, k80_degr, main)
  k80_degr*Gal80p_dim/main;
end
function_24 is "function_4_Gal80p_dim -> null; k80_degr;";

function function_25(k_gal_met, main)
  k_gal_met/main;
end
function_25 is "function_4_galI => null; k_gal_met=k1_cat*Gal1p*galI/(K1_m+galI)";

function function_7(k_tc3, main)
  k_tc3/main;
end
function_7 is "function_4_null => rGal3; k_tc3 = k_tc3_max * Cp*Kp * Gal4p_dim/(1+Cp*(Kp *Gal4p_dim+Cq*Kp * Gal4p_dim*Kq * Gal80p_dim))";

function function_3(k_tl1, main, rGal1)
  k_tl1*rGal1/main;
end
function_3 is "function_4_rGal1 -> rGal1 + Gal1p; k_tl1;";

function function_17(k_tl80, main, rGal80)
  k_tl80*rGal80/main;
end
function_17 is "function_4_rGal80 -> rGal80 + Gal80p; k_tl80;";

function function_4_Gal3pa_null_k3_degr(Gal3pa, k3_degr, main)
  k3_degr*Gal3pa/main;
end
function_4_Gal3pa_null_k3_degr is "function_4_Gal3pa -> null; k3_degr;";

function function_19(Gal4p_dim, k_mon, main)
  k_mon*Gal4p_dim/main;
end
function_19 is "function_4_Gal4p_dim -> Gal4p + Gal4p ; k_mon";

function function_1(k_tc1, main)
  k_tc1/main;
end
function_1 is "function_4_null => rGal1; k_tc1 = k_tc1_max*(Cp* Kp*Gal4p_dim*(2 + Cp* (Kp*Gal4p_dim + 2*Cq*Kp*Gal4p_dim* Kq*Gal80p_dim))* (2 + Cp*(Cp*(Kp*Gal4p_dim)^2 + 2*(Kp*Gal4p_dim)*(1 +Cp*Cq*Kp*Gal4p_dim* Kq*Gal80p_dim) + 2*Cq*Kp*Gal4p_dim* Kq*Gal80p_dim*(2 +Cp*Cq*Kp*Gal4p_dim* Kq*Gal80p_dim))))/(1 + Cp* (Kp*Gal4p_dim + Cq* Kp*Gal4p_dim*Kq*Gal80p_dim))^4";

function function_16(k_r80_degr, main, rGal80)
  k_r80_degr*rGal80/main;
end
function_16 is "function_4_rGal80 -> null; k_r80_degr;";

function function_29(Gal3pa, Gal80p_dim, k3a_80_bind, main)
  k3a_80_bind*Gal3pa*Gal80p_dim/main;
end
function_29 is "function_4_Gal3pa + Gal80p_dim -> Gal3paGal80p; k3a_80_bind";

function function_15(k_tc80, main)
  k_tc80/main;
end
function_15 is "function_4_null => rGal80; k_tc80 = k_tc80_max * Cp*Kp * Gal4p_dim/(1+Cp*(Kp *Gal4p_dim+Cq*Kp * Gal4p_dim*Kq * Gal80p_dim))";

function function_13(k_tl4, main, rGal4)
  k_tl4*rGal4/main;
end
function_13 is "function_4_rGal4 -> rGal4 + Gal4p; k_tl4 ;";

function function_4_Gal3p_null_k3_degr(Gal3p, k3_degr, main)
  k3_degr*Gal3p/main;
end
function_4_Gal3p_null_k3_degr is "function_4_Gal3p -> null; k3_degr;";

function function_22(Gal80p_dim, k_mon, main)
  k_mon*Gal80p_dim/main;
end
function_22 is "function_4_Gal80p_dim -> Gal80p + Gal80p ; k_mon";

model Model_1()
  // NoName

  // Compartments:
  compartment main = 1;

  // Species:
  species rGal1 in main = 10.4865;
  species Gal1p in main = 11587.01;
  species rGal3 in main = 0.1192582;
  species Gal3p in main = 310.0714;
  species rGal4 in main = 0.005699896;
  species Gal4p in main = 20.9062;
  species rGal80 in main = 0.1192582;
  species Gal80p in main = 177.9023;
  species Gal4p_dim in main = 0.437067;
  species Gal80p_dim in main = 31.64921;
  species galE in main = 100000000000;
  species galI in main = 0;
  species Gal3pa in main = 0;
  species Gal3paGal80p in main = 0;
  species $Gal3tot in main;
  species $Gal80tot in main;
  species $Gal1tot in main;

  // Parameters:
  Kp = 0.02104;
  Kq = 0.1052;
  Cp = 1;
  Cq = 30;
  k_tc1_max = 0.2062793;
  k_r1_degr = 0.00037267;
  k_tl1 = 0.03209;
  k1_degr = 2.904216e-5;
  k_tc2_max = 0.5835128;
  k_r2_degr = 0.0012836667;
  k_tl2 = 0.22463167;
  k2_degr = 3.95774e-5;
  k_tc3_max = 0.01;
  k_r3_degr = 0.0004;
  k_tl3 = 0.026;
  k3_degr = 1e-5;
  k_tc4 = 2.352176e-6;
  k_r4_degr = 0.00041267;
  k_tl4 = 0.1785;
  k4_degr = 4.671331e-5;
  k_tc80_max = 0.01;
  k_r80_degr = 0.0004;
  k_tl80 = 0.02;
  k80_degr = 9.888709e-6;
  k_dim = 0.01;
  k_mon = 10;
  k1_cat = 55.8333;
  K1_m = 0.00060018;
  k2act_bind = 0.0001;
  k2act_unbind = 0.07288165;
  K2bound_act = 0.1110643;
  K2_bind = 0.0001001361;
  K2_act = 77.52257;
  k3_act = 266.9402;
  k3_deact = 14.8333;
  k3a_80_bind = 1;
  k3a_80_unbind = 0.00042867;
  FluorFac = 0.4861438;

  // Assignment rules:
  k_gal_met := k1_cat*Gal1p*galI/(K1_m + galI);
  k_tc2 := k_tc2_max*Cp*Kp*Gal4p_dim*(2 + Cp*(Kp*Gal4p_dim + 2*Cq*Kp*Gal4p_dim*Kq*Gal80p_dim))/(1 + Cp*(Kp*Gal4p_dim + Cq*Kp*Gal4p_dim*Kq*Gal80p_dim))^2;
  k_tc1 := k_tc1_max*Cp*Kp*Gal4p_dim*(2 + Cp*(Kp*Gal4p_dim + 2*Cq*Kp*Gal4p_dim*Kq*Gal80p_dim))*(2 + Cp*(Cp*(Kp*Gal4p_dim)^2 + 2*Kp*Gal4p_dim*(1 + Cp*Cq*Kp*Gal4p_dim*Kq*Gal80p_dim) + 2*Cq*Kp*Gal4p_dim*Kq*Gal80p_dim*(2 + Cp*Cq*Kp*Gal4p_dim*Kq*Gal80p_dim)))/(1 + Cp*(Kp*Gal4p_dim + Cq*Kp*Gal4p_dim*Kq*Gal80p_dim))^4;
  k_tc3 := k_tc3_max*Cp*Kp*Gal4p_dim/(1 + Cp*(Kp*Gal4p_dim + Cq*Kp*Gal4p_dim*Kq*Gal80p_dim));
  k_tc80 := k_tc80_max*Cp*Kp*Gal4p_dim/(1 + Cp*(Kp*Gal4p_dim + Cq*Kp*Gal4p_dim*Kq*Gal80p_dim));
  Gal1tot := Gal1p*FluorFac;
  Gal80tot := (Gal3paGal80p + Gal80p_dim + Gal80p)*FluorFac;
  Gal3tot := (Gal3p + Gal3pa + Gal3paGal80p)*FluorFac;

  // Reactions:
  R0: -> rGal1; main*function_1(k_tc1, main); R0 is "null => rGal1; k_tc1 = k_tc1_max*(Cp* Kp*Gal4p_dim*(2 + Cp* (Kp*Gal4p_dim + 2*Cq*Kp*Gal4p_dim* Kq*Gal80p_dim))* (2 + Cp*(Cp*(Kp*Gal4p_dim)^2 + 2*(Kp*Gal4p_dim)*(1 +Cp*Cq*Kp*Gal4p_dim* Kq*Gal80p_dim) + 2*Cq*Kp*Gal4p_dim* Kq*Gal80p_dim*(2 +Cp*Cq*Kp*Gal4p_dim* Kq*Gal80p_dim))))/(1 + Cp* (Kp*Gal4p_dim + Cq* Kp*Gal4p_dim*Kq*Gal80p_dim))^4";
  rGal1_null_k_r1_degr: rGal1 -> ; main*function_4_rGal1_null_k_r1_degr(k_r1_degr, main, rGal1); rGal1_null_k_r1_degr is "rGal1 -> null; k_r1_degr;";
  rGal1_rGal1_Gal1p_k_tl1: rGal1 -> rGal1 + Gal1p; main*function_3(k_tl1, main, rGal1); rGal1_rGal1_Gal1p_k_tl1 is "rGal1 -> rGal1 + Gal1p; k_tl1;";
  Gal1p_null_k1_degr: Gal1p -> ; main*function_4_Gal1p_null_k1_degr(Gal1p, k1_degr, main); Gal1p_null_k1_degr is "Gal1p -> null; k1_degr;";
  R8: -> rGal3; main*function_7(k_tc3, main); R8 is "null => rGal3; k_tc3 = k_tc3_max * Cp*Kp * Gal4p_dim/(1+Cp*(Kp *Gal4p_dim+Cq*Kp * Gal4p_dim*Kq * Gal80p_dim))";
  rGal3_null_k_r3_degr: rGal3 -> ; main*function_4_rGal3_null_k_r3_degr(k_r3_degr, main, rGal3); rGal3_null_k_r3_degr is "rGal3 -> null; k_r3_degr;";
  rGal3_rGal3_Gal3p_k_tl3: rGal3 -> rGal3 + Gal3p; main*function_9(k_tl3, main, rGal3); rGal3_rGal3_Gal3p_k_tl3 is "rGal3 -> rGal3 + Gal3p; k_tl3;";
  Gal3p_null_k3_degr: Gal3p -> ; main*function_4_Gal3p_null_k3_degr(Gal3p, k3_degr, main); Gal3p_null_k3_degr is "Gal3p -> null; k3_degr;";
  null_rGal4_k_tc4: -> rGal4; main*function_4_null_rGal4_k_tc4(k_tc4, main); null_rGal4_k_tc4 is "null -> rGal4; k_tc4";
  rGal4_null_k_r4_degr: rGal4 -> ; main*function_4_rGal4_null_k_r4_degr(k_r4_degr, main, rGal4); rGal4_null_k_r4_degr is "rGal4 -> null ; k_r4_degr";
  rGal4_rGal4_Gal4p_k_tl4: rGal4 -> rGal4 + Gal4p; main*function_13(k_tl4, main, rGal4); rGal4_rGal4_Gal4p_k_tl4 is "rGal4 -> rGal4 + Gal4p; k_tl4 ;";
  Gal4p_null_k4_degr: Gal4p -> ; main*function_4_Gal4p_null_k4_degr(Gal4p, k4_degr, main); Gal4p_null_k4_degr is "Gal4p -> null; k4_degr ;";
  R16: -> rGal80; main*function_15(k_tc80, main); R16 is "null => rGal80; k_tc80 = k_tc80_max * Cp*Kp * Gal4p_dim/(1+Cp*(Kp *Gal4p_dim+Cq*Kp * Gal4p_dim*Kq * Gal80p_dim))";
  rGal80_null_k_r80_degr: rGal80 -> ; main*function_16(k_r80_degr, main, rGal80); rGal80_null_k_r80_degr is "rGal80 -> null; k_r80_degr;";
  rGal80_rGal80_Gal80p_k_tl80: rGal80 -> rGal80 + Gal80p; main*function_17(k_tl80, main, rGal80); rGal80_rGal80_Gal80p_k_tl80 is "rGal80 -> rGal80 + Gal80p; k_tl80;";
  Gal4p_Gal4p_Gal4p_dim_k_dim: 2 Gal4p -> Gal4p_dim; main*function_18(Gal4p, k_dim, main); Gal4p_Gal4p_Gal4p_dim_k_dim is "Gal4p + Gal4p -> Gal4p_dim; k_dim";
  Gal4p_dim_Gal4p_Gal4p_k_mon: Gal4p_dim -> 2 Gal4p; main*function_19(Gal4p_dim, k_mon, main); Gal4p_dim_Gal4p_Gal4p_k_mon is "Gal4p_dim -> Gal4p + Gal4p ; k_mon";
  Gal4p_dim_null_k4_degr: Gal4p_dim -> ; main*function_20(Gal4p_dim, k4_degr, main); Gal4p_dim_null_k4_degr is "Gal4p_dim -> null; k4_degr;";
  Gal80p_Gal80p_Gal80p_dim_k_dim: 2 Gal80p -> Gal80p_dim; main*function_21(Gal80p, k_dim, main); Gal80p_Gal80p_Gal80p_dim_k_dim is "Gal80p + Gal80p -> Gal80p_dim; k_dim";
  Gal80p_dim_Gal80p_Gal80p_k_mon: Gal80p_dim -> 2 Gal80p; main*function_22(Gal80p_dim, k_mon, main); Gal80p_dim_Gal80p_Gal80p_k_mon is "Gal80p_dim -> Gal80p + Gal80p ; k_mon";
  Gal80p_null_k80_degr: Gal80p -> ; main*function_4_Gal80p_null_k80_degr(Gal80p, k80_degr, main); Gal80p_null_k80_degr is "Gal80p -> null; k80_degr;";
  Gal80p_dim_null_k80_degr: Gal80p_dim -> ; main*function_24(Gal80p_dim, k80_degr, main); Gal80p_dim_null_k80_degr is "Gal80p_dim -> null; k80_degr;";
  R27: galI -> ; main*function_25(k_gal_met, main); R27 is "galI => null; k_gal_met=k1_cat*Gal1p*galI/(K1_m+galI)";
  Gal3p_galI_Gal3pa_k3_act: Gal3p + galI -> Gal3pa; main*function_26(Gal3p, galI, k3_act, main); Gal3p_galI_Gal3pa_k3_act is "Gal3p + galI -> Gal3pa; k3_act";
  Gal3pa_Gal3p_galI_k3_deact: Gal3pa -> Gal3p + galI; main*function_27(Gal3pa, k3_deact, main); Gal3pa_Gal3p_galI_k3_deact is "Gal3pa -> Gal3p + galI ; k3_deact";
  Gal3pa_null_k3_degr: Gal3pa -> ; main*function_4_Gal3pa_null_k3_degr(Gal3pa, k3_degr, main); Gal3pa_null_k3_degr is "Gal3pa -> null; k3_degr;";
  R31: Gal3pa + Gal80p_dim -> Gal3paGal80p; main*function_29(Gal3pa, Gal80p_dim, k3a_80_bind, main); R31 is "Gal3pa + Gal80p_dim -> Gal3paGal80p; k3a_80_bind";
  R32: Gal3paGal80p -> Gal3pa + Gal80p_dim; main*function_30(Gal3paGal80p, k3a_80_unbind, main); R32 is "Gal3paGal80p -> Gal3pa + Gal80p_dim ; k3a_80_unbind";
  Gal3paGal80p_null_0_5_k3_degr: Gal3paGal80p -> ; main*function_31(Gal3paGal80p, k3_degr, main); Gal3paGal80p_null_0_5_k3_degr is "Gal3paGal80p -> null; 0.5*k3_degr;";

  // Events:
  Add_Gal: at (time > 1000): galI = 1000;
end
